Num := 200
i := 0 .. Num
j := 0 .. Num
DATA1 := READPRN("./Ey_out.txt")
Ex[i, j] := DATA1[:, 0][i*(Num + 1) + j] + 1i*DATA1[:, 1][i*(Num + 1) + j]
absEx[i, j] := |Ex[i, j]|
PhsEx[i, j] := arg(Ex[i, j])
Ex[200, 170] = -0.064061 + 0.0437708i
DATA2 := READPRN("./Ey_R_Inter.txt")
Ey[i, j] := DATA2[:, 0][i*(Num + 1) + j] + 1i*DATA2[:, 1][i*(Num + 1) + j]
absEy[i, j] := |Ey[i, j]|
PhsEy[i, j] := arg(Ey[i, j] + 0.000001)
Ey[200, 170] = 0
DATA3 := READPRN("./Ey1.txt")
Ez[i, j] := DATA3[:, 0][i*(Num + 1) + j] + 1i*DATA3[:, 1][i*(Num + 1) + j]
absEz[i, j] := |Ez[i, j]|
PhsEz[i, j] := arg(Ez[i, j])
Ez[200, 170] = 0.0118221 - 0.00850031i
# [component: inputs absEx]
# [component: inputs absEy]
# [component: inputs absEz]
ds := 0.0025
C := 3*10^8
f := 10*10^9
λ := C/f
P1[i] := i*ds/sqrt(3)
Phsp[i] := P1[i]/λ*2*3.1415926 + 1.5
Ep[i] := e^(1i*Phsp[i])
PhsEp[i] := arg(Ep[i])
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